// COMSOL Multiphysics 6.0.0.318 model "silicon_sphere.mph"
// Outline of the model tree

Parameters
  E0 = 1[V/m]  // Electromagnetic Field
  radius = 210[nm]  // Radius of the sphere
  r_pml = 7*radius  // Radius of the PML
  t_pml = 2*radius  // Thickness of the PML
  lambda = 1000[nm]  // Initial wavelength
  lambda_min = 800[nm]  // Initial wavelength
  lambda_max = 1900[nm]  // Final wavelength
  lambda_step = 5[nm]  // Wavelength Step
  sigma_geom = pi*(radius^2)  // Geometric cross section
  S_in = E0^2/(2*Z0_const)  // Scalling Factor (本质上是入射的光强)
  n1 = 3.5  // refractive index of the sphere

Variables
  var1 "Variables 1"
    nrelPoav = nx*ewfd.relPoavx + ny*ewfd.relPoavy + nz*ewfd.relPoavz
    sigma_sc = intop_surf(nrelPoav)/S_in  // Scattering cross section
    sigma_abs = intop_vol(ewfd.Qh)/S_in  // Absorption cross section
    sigma_ext = sigma_sc + sigma_abs  // Extinction cross section
    nsigma_sc = sigma_sc/sigma_geom

Selections
  sel1: Explicit "Physical Domains" on domains 5, 6
  com1: Complement "PML Domain" | entitydim = 3; input = {sel1}
  sel2: Explicit "Nanoparticle" on domains 6
  sel3: Explicit "Nanoparticle Surface" on boundaries 13-16, 24, 25, 30, 31
  sel4: Explicit "External PML Surface" on boundaries 5-8, 20, 21, 28, 35
  sel5: Explicit "Internal PML Surface" on boundaries 9-12, 22, 23, 29, 34

Couplings
  intop1: Integration on selection sel2 | opname = intop_vol
  intop2: Integration on selection sel3 | opname = intop_surf

Coordinate systems
  pml1: PML "Perfectly Matched Layer 1" on selection com1 | ScalingType = Spherical; PMLfactor = 0.5

Geometry
  geom1 "Geometry 1" (3D, length unit m)
    sph1: Sphere "Si sphere" | r = radius
    sph2: Sphere | layername = Layer 1; layer = t_pml; r = r_pml
    fin: Finalize "Form Union"

Materials
  mat1: Common "Air" on domains 1-5, 7-10
    def "Basic"
      thermalexpansioncoefficient = alpha_p(pA,T)
      molarmass = 0.02897[kg/mol]
      bulkviscosity = muB(T)
      relpermeability = 1
      relpermittivity = 1
      dynamicviscosity = eta(T)
      ratioofspecificheat = 1.4
      electricconductivity = 0[S/m]
      heatcapacity = Cp(T)
      density = rho(pA,T)
      thermalconductivity = k(T)
      soundspeed = cs(T)
      eta: Piecewise | arg = T; pieces = {200.0, 1600.0, -8.38278E-7+8.35717342E-8*T^1-7.69429583E-11*T^2+4.6437266E-14*T^3-1.06585607E-17*T^4}; argunit = K; fununit = Pa*s
      Cp: Piecewise | arg = T; pieces = {200.0, 1600.0, 1047.63657-0.372589265*T^1+9.45304214E-4*T^2-6.02409443E-7*T^3+1.2858961E-10*T^4}; argunit = K; fununit = J/(kg*K)
      rho: Analytic | expr = pA*0.02897/R_const[K*mol/J]/T; args = {pA, T}; fununit = kg/m^3; argunit = {Pa, K}
      k: Piecewise | arg = T; pieces = {200.0, 1600.0, -0.00227583562+1.15480022E-4*T^1-7.90252856E-8*T^2+4.11702505E-11*T^3-7.43864331E-15*T^4}; argunit = K; fununit = W/(m*K)
      cs: Analytic | expr = sqrt(1.4*R_const[K*mol/J]/0.02897*T); args = T; fununit = m/s; argunit = K
      an1: Analytic | funcname = alpha_p; expr = -1/rho(pA,T)*d(rho(pA,T),T); args = {pA, T}; fununit = 1/K; argunit = {Pa, K}
      an2: Analytic "Analytic 2a" | funcname = muB; expr = 0.6*eta(T); args = T; fununit = Pa*s; argunit = K
    RefractiveIndex
      n = 1
      ki = 0
    NonlinearModel
      BA = (def.gamma+1)/2
    idealGas
      Rs = R_const/Mn
      heatcapacity = Cp(T)
      ratioofspecificheat = 1.4
      molarmass = 0.02897
      Cp: Piecewise | arg = T; pieces = {200.0, 1600.0, 1047.63657-0.372589265*T^1+9.45304214E-4*T^2-6.02409443E-7*T^3+1.2858961E-10*T^4}; argunit = K; fununit = J/(kg*K)
  mat2: Common "Si" on selection sel2
    def "Basic"
      relpermittivity = n1^2
      relpermeability = 1
      electricconductivity = 0

Physics
  ewfd: ElectromagneticWavesFrequencyDomain on all domains
    dependent variable E = {Ex, Ey, Ez}
    BackgroundField.SolveFor = scatteredField
    BackgroundField.Eb = {E0*exp(-j*(2*pi/lambda)*z), 0, 0}
    wee1: WaveEquationElectric (default) | DisplacementFieldModel = RelativePermittivity
    pec1: PerfectElectricConductor (default)
    init1: init "Initial Values 1" (default)
    sctr1: Scattering "Scattering Boundary Condition 1" on selection sel5

Mesh
  mesh1 "Mesh 1"
    size: MeshSizeDefault | hmax = 2.94E-7; hmin = 5.29E-8; hcurve = 0.6; hnarrow = 0.5; hgrad = 1.5
    ftet1: FreeTet "Free Tetrahedral 1" on domains 6
      size1: Size on domains 6 | hmax = lambda_min/32; hauto = 1; custom = on
    ftet2: FreeTet "自由四面体网格 2" on domains 5
      size1: Size "大小 1" on domains 5 | hmax = lambda_min/8; hauto = 4; custom = on
    swe1: Sweep "扫掠 1" on remaining entities
      dis1: Distribution "分布 1" on domains 1-4, 7-10

Studies
  std1 "Study 1"
    param: Parametric "Parametric Sweep"
      pname = lambda
      plistarr = range(lambda_min, lambda_step, lambda_max)
      punit = m
      keepsol = last
      save = on
      filename = .\step\param.mph
    freq: Frequency "Frequency Domain" | punit = Hz; plist = c_const/lambda

Solver configurations
  sol1 "Solution 1" (study std1)
    v1: Variables "因变量 1"
    s1: Stationary "稳态求解器 1"
      p1: Parametric "参数化 1" | pname = freq; plistarr = c_const/lambda; punit = Hz; pcontinuationmode = no
      fc1: FullyCoupled "全耦合 1" | linsolver = i1
      i1: Iterative "建议的迭代求解器 (ewfd)" | linsolver = bicgstab
        mg1: Multigrid "多重网格 1"
  sol2 "Parametric Solutions 1" (study std1)

Datasets
  dset1: Solution | solution = sol1
  dset2: Solution | solution = sol2
  cln1: CutLine3D | data = dset2; genpoints = {{0, 0, -2300}, {0, 0, 2300}}

Derived values
  gev1: EvalGlobal "Global Evaluation 1" | data = dset2; table = new; expr = sigma_sc

Plots
  pg1: PlotGroup3D "Electric Field (ewfd)" | data = dset2
    mslc1: Multislice | expr = ewfd.normE